Mon Feb 24 12:17:19 EST 2020
$SIZES      PD=-150

$PROB run13.mod; Claret TGI model

$INPUT

C	PROT	NSID	ID	STID	DOSE	DOSEP	DOSIV
DOSIVP	DOS2	DOS2P	TRT	TRTG=DROP	PERD	NTPD	DAY
TIME	FLAGE	AGE	SEX	RACE	ETHN	RACD	BWT
SMOK	BBMI	BCCL	BCAL	BPLT	BNEU	BHGB	BALB
BLDH	BALT	BAST	BBIL	BSLD	DV	SURT	CENS
ECOG	METS	LIVMET	LNGMET	BONMET	MSKCC	HENG	EGFR
EVID	EVNT	DOSRED	DOSINT	BLYM
DSLD	TREAT=DROP	TREAT2=DROP	LBSLD	LSLD

;TAFD is time in weeks
;DV is the SLD column in mm

$DATA RCC_COMBINED_PD2_SLD_31OCT2019.csv
IGNORE=@

$SUBROUTINE ADVAN 13 TOL=6

$MODEL
COMP=TUMOR

$PK
;;; LAMTRT-DEFINITION START
IF(TRT.EQ.2)   LAMTRT = 1
IF(TRT.EQ.1)   LAMTRT = (1+THETA(15))
IF(TRT.EQ.3)   LAMTRT = (1+THETA(16))
IF(TRT.EQ.4)   LAMTRT = (1+THETA(17))
IF(TRT.EQ.5)   LAMTRT = (1+THETA(18))
;;; LAMTRT-DEFINITION END

;;; LAM-RELATION START
LAMCOV=LAMTRT
;;; LAM-RELATION END

;;; KLTRT-DEFINITION START
IF(TRT.EQ.2)   KLTRT = 1
IF(TRT.EQ.1)   KLTRT = (1+THETA(11))
IF(TRT.EQ.3)   KLTRT = (1+THETA(12))
IF(TRT.EQ.4)   KLTRT = (1+THETA(13))
IF(TRT.EQ.5)   KLTRT = (1+THETA(14))
;;; KLTRT-DEFINITION END

;;; KL-RELATION START
KLCOV=KLTRT
;;; KL-RELATION END

;;; KDTRT-DEFINITION START
IF(TRT.EQ.2)   KDTRT = 1
IF(TRT.EQ.1)   KDTRT = (1+THETA(7))
IF(TRT.EQ.3)   KDTRT = (1+THETA(8))
IF(TRT.EQ.4)   KDTRT = (1+THETA(9))
IF(TRT.EQ.5)   KDTRT = (1+THETA(10))
;;; KDTRT-DEFINITION END

;;; KDBSLD-DEFINITION START
   KDBSLD = ((BSLD/91)**THETA(6))
;;; KDBSLD-DEFINITION END

;;; KD-RELATION START
KDCOV=KDBSLD*KDTRT
;;; KD-RELATION END

TVKL=LOG(THETA(1)/52)		; change to rate/year from /weeks

TVKL = KLCOV*TVKL
MU_1=TVKL
KL = EXP(MU_1+ETA(1))

TVKD=LOG(THETA(2)/52)

TVKD = KDCOV*TVKD
MU_2=TVKD
KD = EXP(MU_2+ETA(2))

TVLAM=LOG(THETA(3)/52)

TVLAM = LAMCOV*TVLAM
MU_3=TVLAM
LAM = EXP(MU_3+ETA(3))

A_0(1)=BSLD

$DES

  ;y(t) = y(0) exp[ kL t - (kD Treatment/lam)(1-exp(-lam t)) ].
  ;dy/dt = [kL t - kD/lam Treatment (exp(-lam t))] y(t).

DADT(1) = (KL - KD*EXP(-LAM*T))*A(1)

$ERROR

IPRED=A(1)
W = SQRT(THETA(4)**2*IPRED**2+THETA(5)**2)

Y=IPRED+W*ERR(1)

IWRES=(DV-IPRED)/W

XL=LOG(KL)
XD=LOG(LAM*KD)

IF(XL.GT.XD) THEN
   TTG=0
ELSE
  TTG=(LOG(LAM*KD)-LOG(KL))/LAM ; added lam for KD term to adjust
ENDIF


   W6 = BSLD*EXP(KL*6-(KD/LAM)*(1-EXP(-LAM*6)))
   W8 = BSLD*EXP(KL*8-(KD/LAM)*(1-EXP(-LAM*8)))
   TR6= W6/BSLD
   TR8= W8/BSLD


$THETA  (0,0.143663) ; KL
 (0,1.60217) ; KD
 (0,3.939) ; LAM
 (0.01,0.0811432) ; Proportional Error
 (0.01,2.26872) ; Additive Error

$THETA  (-100,0.0506293,100000) ; KDBSLD1

$THETA  (-100000,0.352134,100000) ; KDTRT1
 (-100000,-0.0745063,100000) ; KDTRT2
 (-100000,0.0073258,100000) ; KDTRT3
 (-100000,-0.0769689,100000) ; KDTRT4

$THETA  (-100000,-0.0946182,100000) ; KLTRT1
 (-100000,-0.036812,100000) ; KLTRT2
 (-100000,0.0612846,100000) ; KLTRT3
 (-100000,0.0898521,100000) ; KLTRT4

$THETA  (-100000,0.212748,100000) ; LAMTRT1
 (-100000,-0.397089,100000) ; LAMTRT2
 (-100000,0.0522,100000) ; LAMTRT3
 (-100000,0.0611664,100000) ; LAMTRT4

$OMEGA  2.26315  ;    ETA(KL)
 0.839075  ;    ETA(KD)
 1.66932  ;   ETA(LAM)

$SIGMA  1  FIX

;$EST PRINT=10 MAXEVAL=9999 METHOD=1 INTER  FILE=run4.ext

$EST METHOD=SAEM EONLY=0 INTER NBURN=3000 NITER=250 SEED=2019 PRINT=50 DF=0
GRD=DDDSS CTYPE=3 CITER=10 CALPHA=0.05 ISAMPLE=2 IACCEPT=0.4
$EST METHOD=IMP EONLY=1 NITER=5 ISAMPLE=4000 PRINT=1 DF=4 GRD=DDDSS IACCEPT=1.0 MAPITER=0 FILE=run13.ext
CTYPE=3 CITER=10 CALPHA=0.05 MSFO=MK13.msf

$COV PRINT=E

$TABLE PROT ID TIME IPRED WRES CWRES IWRES
KL KD LAM TTG TR6 TR8
BSLD DV DSLD LBSLD LSLD TRT
ETA1 ETA2 ETA3
FORMAT=sF12.6 ONEHEADER NOPRINT FILE=tgi13.fit

NM-TRAN MESSAGES
 WARNINGS AND ERRORS (IF ANY) FOR PROBLEM    1
 (WARNING  2) NM-TRAN INFERS THAT THE DATA ARE POPULATION.
 (MU_WARNING 26) DATA ITEM(S) USED IN DEFINITION OF MU_(S) SHOULD BE CONSTANT FOR INDIV. REC.:
  BSLD

1NONLINEAR MIXED EFFECTS MODEL PROGRAM (NONMEM) VERSION 7.4.3
 ORIGINALLY DEVELOPED BY STUART BEAL, LEWIS SHEINER, AND ALISON BOECKMANN
 CURRENT DEVELOPERS ARE ROBERT BAUER, ICON DEVELOPMENT SOLUTIONS,
 AND ALISON BOECKMANN. IMPLEMENTATION, EFFICIENCY, AND STANDARDIZATION
 PERFORMED BY NOUS INFOSYSTEMS.
 PROBLEM NO.:         1
 run13.mod; Claret TGI model
 TOT. NO. OF OBS RECS:    12356
 TOT. NO. OF INDIVIDUALS:     1839
 GENERAL NONLINEAR KINETICS MODEL WITH STIFF/NONSTIFF EQUATIONS (LSODA, ADVAN13)
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 #TBLN:      1
 #METH: Stochastic Approximation Expectation-Maximization
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
 #TERM:
 STOCHASTIC PORTION WAS COMPLETED
 REDUCED STOCHASTIC PORTION WAS COMPLETED

 ETABAR IS THE ARITHMETIC MEAN OF THE ETA-ESTIMATES,
 AND THE P-VALUE IS GIVEN FOR THE NULL HYPOTHESIS THAT THE TRUE MEAN IS 0.

 ETABAR:         2.7814E-06  1.3538E-04  1.0559E-04
 SE:             2.3057E-02  1.6658E-02  1.9218E-02
 N:                    1839        1839        1839

 P VAL.:         9.9990E-01  9.9352E-01  9.9562E-01

 ETASHRINKSD(%)  3.5460E+01  2.2107E+01  3.6409E+01
 ETASHRINKVR(%)  5.8345E+01  3.9327E+01  5.9562E+01
 EBVSHRINKSD(%)  3.5458E+01  2.2105E+01  3.6399E+01
 EBVSHRINKVR(%)  5.8344E+01  3.9324E+01  5.9549E+01
 EPSSHRINKSD(%)  1.1890E+00
 EPSSHRINKVR(%)  2.3638E+00


 TOTAL DATA POINTS NORMALLY DISTRIBUTED (N):        12356
 N*LOG(2PI) CONSTANT TO OBJECTIVE FUNCTION:    22708.809032553872
 OBJECTIVE FUNCTION VALUE WITHOUT CONSTANT:    62324.465067571509
 OBJECTIVE FUNCTION VALUE WITH CONSTANT:       85033.274100125389
 REPORTED OBJECTIVE FUNCTION DOES NOT CONTAIN CONSTANT

 TOTAL EFFECTIVE ETAS (NIND*NETA):                          5517
 NIND*NETA*LOG(2PI) CONSTANT TO OBJECTIVE FUNCTION:    10139.567775380357
 OBJECTIVE FUNCTION VALUE WITHOUT CONSTANT:    62324.465067571509
 OBJECTIVE FUNCTION VALUE WITH CONSTANT:       72464.032842951870
 REPORTED OBJECTIVE FUNCTION DOES NOT CONTAIN CONSTANT


 #TERE:
 Elapsed estimation  time in seconds:  1441.23
 Elapsed covariance  time in seconds:     0.32

 ********************                STOCHASTIC APPROXIMATION EXPECTATION-MAXIMIZATION               ********************
 #OBJT:**************                        FINAL VALUE OF LIKELIHOOD FUNCTION                      ********************
 #OBJV:********************************************    62324.465       **************************************************

 ********************                STOCHASTIC APPROXIMATION EXPECTATION-MAXIMIZATION               ********************
 ********************                             FINAL PARAMETER ESTIMATE                           ********************

 THETA - VECTOR OF FIXED EFFECTS PARAMETERS   *********
         TH 1      TH 2      TH 3      TH 4      TH 5      TH 6      TH 7      TH 8      TH 9      TH10      TH11      TH12
          TH13      TH14      TH15      TH16      TH17      TH18
         1.40E-01  1.61E+00  3.98E+00  8.13E-02  2.26E+00  5.08E-02  3.55E-01 -7.75E-02  9.70E-03 -7.73E-02 -9.00E-02 -3.13E-02
          6.43E-02  9.23E-02  1.83E-01 -4.13E-01  5.32E-02  6.20E-02

 OMEGA - COV MATRIX FOR RANDOM EFFECTS - ETAS  ********
         ETA1      ETA2      ETA3
 ETA1
+        2.35E+00
 ETA2
+        0.00E+00  8.42E-01
 ETA3
+        0.00E+00  0.00E+00  1.68E+00

 SIGMA - COV MATRIX FOR RANDOM EFFECTS - EPSILONS  ****
         EPS1
 EPS1
+        1.00E+00

 OMEGA - CORR MATRIX FOR RANDOM EFFECTS - ETAS  *******
         ETA1      ETA2      ETA3
 ETA1
+        1.53E+00
 ETA2
+        0.00E+00  9.17E-01
 ETA3
+        0.00E+00  0.00E+00  1.30E+00

 SIGMA - CORR MATRIX FOR RANDOM EFFECTS - EPSILONS  ***
         EPS1
 EPS1
+        1.00E+00

 ********************                STOCHASTIC APPROXIMATION EXPECTATION-MAXIMIZATION               ********************
 ********************                          STANDARD ERROR OF ESTIMATE (S)                        ********************

 THETA - VECTOR OF FIXED EFFECTS PARAMETERS   *********
         TH 1      TH 2      TH 3      TH 4      TH 5      TH 6      TH 7      TH 8      TH 9      TH10      TH11      TH12
          TH13      TH14      TH15      TH16      TH17      TH18
         1.46E-02  8.20E-02  3.77E-01  1.95E-04  1.67E-02  9.74E-03  2.84E-02  4.71E-02  2.74E-02  2.00E-02  2.72E-02  5.24E-02
          3.52E-02  2.73E-02  9.10E-02  9.74E-02  6.99E-02  4.67E-02

 OMEGA - COV MATRIX FOR RANDOM EFFECTS - ETAS  ********
         ETA1      ETA2      ETA3
 ETA1
+        2.37E-01
 ETA2
+        0.00E+00  5.78E-02
 ETA3
+        0.00E+00  0.00E+00  1.52E-01

 SIGMA - COV MATRIX FOR RANDOM EFFECTS - EPSILONS  ****
         EPS1
 EPS1
+        0.00E+00

 OMEGA - CORR MATRIX FOR RANDOM EFFECTS - ETAS  *******
         ETA1      ETA2      ETA3
 ETA1
+        7.73E-02
 ETA2
+       .........  3.15E-02
 ETA3
+       ......... .........  5.88E-02

 SIGMA - CORR MATRIX FOR RANDOM EFFECTS - EPSILONS  ***
         EPS1
 EPS1
+       .........
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
 ********************                STOCHASTIC APPROXIMATION EXPECTATION-MAXIMIZATION               ********************
 ********************                    EIGENVALUES OF COR MATRIX OF ESTIMATE (S)                   ********************

             1         2         3         4         5         6         7         8         9        10        11        12
             13        14        15        16        17        18        19        20        21
         1.27E-01  1.53E-01  1.97E-01  3.25E-01  4.02E-01  4.27E-01  4.53E-01  5.53E-01  6.77E-01  7.96E-01  8.67E-01  9.76E-01
          1.03E+00  1.06E+00  1.23E+00  1.36E+00  1.45E+00  1.47E+00  1.80E+00  2.48E+00  3.17E+00
 #TBLN:      2
 #METH: Objective Function Evaluation by Importance Sampling
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
 #TERM:
 EXPECTATION ONLY PROCESS COMPLETED

 ETABAR IS THE ARITHMETIC MEAN OF THE ETA-ESTIMATES,
 AND THE P-VALUE IS GIVEN FOR THE NULL HYPOTHESIS THAT THE TRUE MEAN IS 0.

 ETABAR:         4.5661E-03  3.0260E-03 -3.1034E-03
 SE:             2.3084E-02  1.6643E-02  1.9231E-02
 N:                    1839        1839        1839

 P VAL.:         8.4320E-01  8.5573E-01  8.7180E-01

 ETASHRINKSD(%)  3.5386E+01  2.2175E+01  3.6367E+01
 ETASHRINKVR(%)  5.8251E+01  3.9432E+01  5.9509E+01
 EBVSHRINKSD(%)  3.5599E+01  2.2069E+01  3.6512E+01
 EBVSHRINKVR(%)  5.8526E+01  3.9267E+01  5.9693E+01
 EPSSHRINKSD(%)  7.9524E-04
 EPSSHRINKVR(%)  1.5905E-03


 TOTAL DATA POINTS NORMALLY DISTRIBUTED (N):        12356
 N*LOG(2PI) CONSTANT TO OBJECTIVE FUNCTION:    22708.809032553872
 OBJECTIVE FUNCTION VALUE WITHOUT CONSTANT:    65923.893857959090
 OBJECTIVE FUNCTION VALUE WITH CONSTANT:       88632.702890512970
 REPORTED OBJECTIVE FUNCTION DOES NOT CONTAIN CONSTANT

 TOTAL EFFECTIVE ETAS (NIND*NETA):                          5517


 #TERE:
 Elapsed estimation  time in seconds:  1036.38
 Elapsed covariance  time in seconds:  1248.07

 ********************               OBJECTIVE FUNCTION EVALUATION BY IMPORTANCE SAMPLING             ********************
 #OBJT:**************                        FINAL VALUE OF OBJECTIVE FUNCTION                       ********************
 #OBJV:********************************************    65923.894       **************************************************

 ********************               OBJECTIVE FUNCTION EVALUATION BY IMPORTANCE SAMPLING             ********************
 ********************                             FINAL PARAMETER ESTIMATE                           ********************

 THETA - VECTOR OF FIXED EFFECTS PARAMETERS   *********
         TH 1      TH 2      TH 3      TH 4      TH 5      TH 6      TH 7      TH 8      TH 9      TH10      TH11      TH12
          TH13      TH14      TH15      TH16      TH17      TH18
         1.40E-01  1.61E+00  3.98E+00  8.13E-02  2.26E+00  5.08E-02  3.55E-01 -7.75E-02  9.70E-03 -7.73E-02 -9.00E-02 -3.13E-02
          6.43E-02  9.23E-02  1.83E-01 -4.13E-01  5.32E-02  6.20E-02

 OMEGA - COV MATRIX FOR RANDOM EFFECTS - ETAS  ********
         ETA1      ETA2      ETA3
 ETA1
+        2.35E+00
 ETA2
+        0.00E+00  8.42E-01
 ETA3
+        0.00E+00  0.00E+00  1.68E+00

 SIGMA - COV MATRIX FOR RANDOM EFFECTS - EPSILONS  ****
         EPS1
 EPS1
+        1.00E+00

 OMEGA - CORR MATRIX FOR RANDOM EFFECTS - ETAS  *******
         ETA1      ETA2      ETA3
 ETA1
+        1.53E+00
 ETA2
+        0.00E+00  9.17E-01
 ETA3
+        0.00E+00  0.00E+00  1.30E+00

 SIGMA - CORR MATRIX FOR RANDOM EFFECTS - EPSILONS  ***
         EPS1
 EPS1
+        1.00E+00

 ********************               OBJECTIVE FUNCTION EVALUATION BY IMPORTANCE SAMPLING             ********************
 ********************                         STANDARD ERROR OF ESTIMATE (RSR)                       ********************

 THETA - VECTOR OF FIXED EFFECTS PARAMETERS   *********
         TH 1      TH 2      TH 3      TH 4      TH 5      TH 6      TH 7      TH 8      TH 9      TH10      TH11      TH12
          TH13      TH14      TH15      TH16      TH17      TH18
         1.63E-02  8.44E-02  3.66E-01  5.35E-03  1.97E-01  1.06E-02  4.21E-02  5.94E-02  3.14E-02  2.01E-02  2.42E-02  3.52E-02
          3.72E-02  2.95E-02  1.45E-01  1.19E-01  7.30E-02  5.19E-02

 OMEGA - COV MATRIX FOR RANDOM EFFECTS - ETAS  ********
         ETA1      ETA2      ETA3
 ETA1
+        1.76E-01
 ETA2
+        0.00E+00  6.19E-02
 ETA3
+        0.00E+00  0.00E+00  2.56E-01

 SIGMA - COV MATRIX FOR RANDOM EFFECTS - EPSILONS  ****
         EPS1
 EPS1
+        0.00E+00

 OMEGA - CORR MATRIX FOR RANDOM EFFECTS - ETAS  *******
         ETA1      ETA2      ETA3
 ETA1
+        5.74E-02
 ETA2
+       .........  3.38E-02
 ETA3
+       ......... .........  9.87E-02

 SIGMA - CORR MATRIX FOR RANDOM EFFECTS - EPSILONS  ***
         EPS1
 EPS1
+       .........
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
 ********************               OBJECTIVE FUNCTION EVALUATION BY IMPORTANCE SAMPLING             ********************
 ********************                   EIGENVALUES OF COR MATRIX OF ESTIMATE (RSR)                  ********************

             1         2         3         4         5         6         7         8         9        10        11        12
             13        14        15        16        17        18        19        20        21
         8.19E-02  1.36E-01  1.88E-01  2.29E-01  2.62E-01  2.76E-01  3.80E-01  6.38E-01  6.90E-01  7.75E-01  7.99E-01  8.02E-01
          9.04E-01  9.68E-01  1.19E+00  1.30E+00  1.61E+00  1.72E+00  2.00E+00  2.47E+00  3.57E+00
 Elapsed postprocess time in seconds:     3.27
 Elapsed finaloutput time in seconds:     0.46
 #CPUT: Total CPU Time in Seconds,     3724.619
